! TUNNEL_V2_ATTR


/prep7

! Code version
Version=1

!!                                                                                                !!
!! 2.1  Constants                                                                                 !!
!!                                                                                                !!
pi=ACOS(-1)

! Concrete Poisson's coefficient
Poisson=0.2
! Concrete mass density
MassDensity=2500

! Corrected mass density of top slab (accounting for EPS layer)
*get,parType,PARM,EPSThk,TYPE
*if,parType,NE,0,THEN
  EPSThk=0
*endif
TopSlab_EqvMassDensity=2500*(GEO_ROOF_thk-EPSThk)/GEO_ROOF_thk

! Water mass density
MAT_WATER_density = 1000

! Soil porosity (used to calculate mass density increment for saturated soils)
! Recommended value: 0.1
MAT_SOIL_porosity = 0.1

! Soil springs: elastic modulus
SpringElasticModulus=1e9
! Soil springs: length
SpringLength=1
LongitSpringLength=(SpringLength*(MAT_SOIL_stiffness/100e6)<SpringLength)

! Gravitational acceleration
LOAD_g_k = 9.81

! Number of substeps
SubstepCount = 5

! Minimum soil cover (smaller depths mean loads are applied directly on top slab)
MinimumSoilCover = 0.01

! Cross-sectional area of rigid struts
REAL_rigidStrut_A=1

POST_convolutionRadius = 0.50

GRAPH_picRes = 1500

FOLDER_setup   = '_setup'
FOLDER_results = '_results'


!!                                                                                                !!
!! 2.2  Indices                                                                                   !!
!!                                                                                                !!
! Coordinate systems
CS_global         = 11 ! TODO: rename to CS_global
CS_dummy          = 12
CS_tunnel         = 13
CS_RevTunnel      = 14

CS_top            = 15
CS_bot            = 16
CS_left           = 17
CS_right          = 18

CS_roof           = 19
CS_floor          = 20
CS_leftWall       = 21
CS_rightWall      = 22

CS_begSkewed      = 23
CS_endSkewed      = 24

CS_FRM1_beams     = 25
CS_FRM1_columns   = 26
CS_FRM2_beams     = 27
CS_FRM2_columns   = 28

CS_hdw1           = 29
CS_hdw2           = 30
CS_HDW_columns    = 31
CS_HDW1_leftWall  = 32
CS_HDW1_rightWall = 33
CS_HDW2_leftWall  = 34
CS_HDW2_rightWall = 35
CS_HDW1_leftFoot  = 36
CS_HDW1_rightFoot = 37
CS_HDW2_leftFoot  = 38
CS_HDW2_rightFoot = 39

CS_approachLeft   = 40
CS_approachRight  = 41

CS_free           = 42

*del , CS_innerWalls    ,  , nopr
*del , CS_IWALL_beams   ,  , nopr
*del , CS_IWALL_columns ,  , nopr
*dim , CS_innerWalls    ,  , GEO_TUN_modules-1
*dim , CS_IWALL_beams   ,  , GEO_TUN_modules-1
*dim , CS_IWALL_columns ,  , GEO_TUN_modules-1
*do,nthIwall,1,GEO_TUN_modules-1,1
  wall                       = CS_free+(3*nthIwall-2)
  beam                       = CS_free+(3*nthIwall-1)
  column                     = CS_free+(3*nthIwall-0)
  CS_innerWalls(nthIwall)    = wall
  CS_IWALL_beams(nthIwall)   = beam
  CS_IWALL_columns(nthIwall) = column
  CS_innerWall%nthIwall%     = wall
  CS_IWALL_beam%nthIwall%    = beam
  CS_IWALL_column%nthIwall%  = column
*enddo

CS_BASE_corbelBot = 1000
CS_BASE_corbelTop = 2000
CS_BASE_iwall     = 3000

! Cross-sections
SEC_ROOF    = 1
SEC_FLOOR   = 2
SEC_LWALL   = 3
SEC_RWALL   = 4
SEC_IWALL   = 5
SEC_APR     = 6
SEC_bBeam   = 7
SEC_tBeam   = 8
SEC_columns = 9

SEC_HDW_Wall       = 10
SEC_HDW_Footing    = 11
SEC_HDW_Slab       = 12
SEC_HDW_Stiffener  = 13
SEC_FRAME_Column   = 14
SEC_FRAME_headBeam = 15
SEC_HDW_frontBeam  = 16
SEC_FRAME_backBeam = 17

SEC_pileInt = 20
SEC_pileExt = 21

SEC_strut = 22

SEC_ROOF_LCORBEL  = 400
SEC_ROOF_RCORBEL  = 500
SEC_FLOOR_LCORBEL = 600
SEC_FLOOR_RCORBEL = 700
SEC_WALL_BCORBEL  = 800
SEC_WALL_TCORBEL  = 900

! Materials
MAT_CONC   = 1
MAT_SOIL   = 2
MAT_CONCTS = 3
MAT_RIGID  = 4

! Element types
TYPE_SHELL181 = 1
TYPE_LINK180  = 2
TYPE_COMBIN39 = 3
TYPE_BEAM188  = 4

! Real constants
REAL_default     = 1
REAL_normSprings = 2
REAL_longSprings = 3
REAL_hdwSprings  = 4
REAL_roofSprings = 5
REAL_rigidStrut  = 6


!!                                                                                                !!
!! 2.3  Geometry                                                                                  !!
!!                                                                                                !!
! Inner wall thickness
*if,GEO_TUN_modules,gt,1,then
  *if,GEO_IWALL_type,eq,1,then
    GEO_IWALL_thk = ((GEO_IWALL_topBeamWidth>GEO_IWALL_botBeamWidth)>GEO_IWALL_columnThk)
  *endif
*endif

! Calculate effective spans (distance between mid-planes)
Eff_GalleryWidth  = GEO_TUN_moduleWidth+GEO_OWALL_thk
Eff_GalleryHeight = GEO_TUN_height+(GEO_FLOOR_thk+GEO_ROOF_thk)/2

GEO_TUN_effW    = Eff_GalleryWidth
GEO_TUN_effH    = Eff_GalleryHeight
GEO_TUN_totEffW = GEO_TUN_effW*GEO_TUN_modules

! Calculate length increment due to tunnel skewness
*afun,deg
GEO_extraBegLength = 0 ! tan(GEO_TUN_begSkewness)*GEO_TUN_totEffW ! TODO  these have to be zero, there is no way to correct for skewness
GEO_extraEndLength = 0 ! tan(GEO_TUN_endSkewness)*GEO_TUN_totEffW !       withouth ambiguity given a tunnel length
GEO_TUN_length     = GEO_TUN_length+GEO_extraBegLength+GEO_extraEndLength
*afun,rad

! Tunnel slope (in degrees)
TunnelSlope=ATAN(GEO_TUN_slope/100)*180/pi

! Traffic/track direction (in radians)
LOAD_LTA_skewRad = LOAD_LTA_skew*(pi/180)

! Area of shell elements
ElementArea=FEM_TUN_esize**2

! Water level (global cartesian coordinate)
*if,GEO_EMB_waterDepth,GE,0,THEN
  WaterY=GEO_EMB_height-GEO_EMB_waterDepth+Eff_GalleryHeight
  WaterHeight=Eff_GalleryHeight+GEO_EMB_height-GEO_EMB_waterDepth
*else
  WaterY=0
  WaterHeight=0
*endif
*if,Waterheight,GT,Eff_GalleryHeight,THEN
  WaterHeight=Eff_GalleryHeight
*endif

! Angle of soil slopes along the tunnel's longitudinal direction
*get,parType,PARM,GEO_EMB_slopeBeg,TYPE
*if,parType,NE,0,THEN
  GalleryAlphai=0
*else
  GalleryAlphai=90-GEO_EMB_slopeBeg
*endif
*get,parType,PARM,GEO_EMB_slopeEnd,TYPE
*if,parType,NE,0,THEN
  GalleryAlphaf=0
*else
  GalleryAlphaf=90-GEO_EMB_slopeEnd
*endif

! Calculate corbel offsets
roof_xProjection   = (GEO_ROOF_thk/2)*(GEO_CORB_width/GEO_CORB_height)
roof_yProjection   = (GEO_OWALL_thk/2)*(GEO_CORB_height/GEO_CORB_width)
GEO_corbelXOff_TOP = GEO_CORB_width+(GEO_OWALL_thk/2)+roof_xProjection
GEO_corbelYOff_TOP = GEO_CORB_height+(GEO_ROOF_thk/2)+roof_yProjection

floor_xProjection  = (GEO_FLOOR_thk/2)*(GEO_CORB_height/GEO_CORB_width)
floor_yProjection  = (GEO_OWALL_thk/2)*(GEO_CORB_height/GEO_CORB_width)
GEO_corbelXOff_BOT = GEO_CORB_width+(GEO_OWALL_thk/2)+floor_xProjection
GEO_corbelYOff_BOT = GEO_CORB_height+(GEO_FLOOR_thk/2)+floor_yProjection

! Calculate approach slab position
*if,GEO_APR_status,EQ,1,THEN

  ! Set default approach slab position based on load train layout
  *if,GEO_APR_position,eq,0,then
    GEO_APR_position = (LOAD_LTA_offsets(1)+LOAD_LTA_offsets(LOAD_LTA_count))/2
  *endif

  *afun,deg
  GEO_APR_obliqueWidth      = GEO_APR_width/cos(-LOAD_LTA_skew)
  GEO_APR_positionOffset    = (GEO_TUN_totEffW/2)*tan(-LOAD_LTA_skew)
  GEO_APR_positionLeft      = GEO_APR_position-GEO_APR_positionOffset
  GEO_APR_positionRight     = GEO_APR_position+GEO_APR_positionOffset
  GEO_APR_obliqueLength     = GEO_APR_length*cos(-LOAD_LTA_skew)
  GEO_APR_axialSkewedLength = GEO_APR_obliqueLength*tan(-LOAD_LTA_skew)
  *afun,rad
*endif

! Calculate roof gap positions
*if,GEO_ROOF_gapStatus,eq,1,then
  GEO_ROOF_gapCount        = GEO_ROOF_gapStrutCount+1
  GEO_ROOF_gapWidth        = GEO_ROOF_gapEnd-GEO_ROOF_gapBeg
  GEO_ROOF_gapStrutSpacing = (GEO_ROOF_gapWidth-(GEO_ROOF_gapStrutCount*GEO_ROOF_gapStrutWidth))/GEO_ROOF_gapCount
  GEO_ROOF_gapStrutPitch   = GEO_ROOF_gapStrutSpacing+GEO_ROOF_gapStrutWidth

  *del , GEO_ROOF_gap_z_begs ,  , nopr
  *del , GEO_ROOF_gap_z_ends ,  , nopr
  *dim , GEO_ROOF_gap_z_begs ,  , GEO_ROOF_gapCount
  *dim , GEO_ROOF_gap_z_ends ,  , GEO_ROOF_gapCount

  *vfill , GEO_ROOF_gap_z_begs , ramp                , GEO_ROOF_gapBeg , GEO_ROOF_gapStrutPitch
  *voper , GEO_ROOF_gap_z_ends , GEO_ROOF_gap_z_begs , add             , GEO_ROOF_gapStrutSpacing
*endif

! Calculate precast girder positions
*if,GEO_ROOF_type,eq,1,then
  GEO_ROOF_wallConnection=1

  GEO_girderCount = nint((GEO_TUN_length/GEO_ROOF_precastWidth)-0.5)
  remLength       = GEO_TUN_length-(GEO_girderCount*GEO_ROOF_precastWidth)
  extrmbc         = GEO_ROOF_precastWidth+(remLength/2)

  *del   , GEO_girderZ ,       , nopr
  *dim   , GEO_girderZ , array , GEO_girderCount-1
  *vfill , GEO_girderZ , ramp  , extrmbc           , GEO_ROOF_precastWidth
*endif

! Check corbel status and pinned roof status
*if,GEO_ROOF_wallConnection,eq,1,then
  *if,GEO_CORB_status,eq,1,then
    GEO_CORB_status=3
    *msg,WARN
WARNING: Pin and corbel are incompatible. GEO_CORB_status set to 3 (bottom slab only).
  *elseif,GEO_CORB_status,eq,2,then
    GEO_CORB_status=0
    *msg,WARN
WARNING: Pin and corbel are incompatible. GEO_CORB_status set to 0 (OFF).
  *endif
*endif

! Inner wall positions
GEO_IWALL_count        = GEO_TUN_modules-1
GEO_IWALL_openingCount = GEO_IWALL_columnCount-1

*del , GEO_IWALL_x_coords       ,  , nopr
*del , GEO_IWALL_zBeg_coords    ,  , nopr
*del , GEO_IWALL_zEnd_coords    ,  , nopr
*del , GEO_IWALL_axial_lengths  ,  , nopr
*dim , GEO_IWALL_x_coords       ,  , GEO_IWALL_count
*dim , GEO_IWALL_zBeg_coords    ,  , GEO_IWALL_count
*dim , GEO_IWALL_zEnd_coords    ,  , GEO_IWALL_count
*dim , GEO_IWALL_axial_lengths  ,  , GEO_IWALL_count

*afun  , deg
*vfill , GEO_IWALL_x_coords      , ramp                  , GEO_TUN_effW , GEO_TUN_effW
*voper , GEO_IWALL_zBeg_coords   , GEO_IWALL_x_coords    , mult         , tan(GEO_TUN_begSkewness)
*voper , GEO_IWALL_zEnd_coords   , GEO_TUN_totEffW       , sub          , GEO_IWALL_x_coords
*voper , GEO_IWALL_zEnd_coords   , GEO_IWALL_zEnd_coords , mult         , tan(GEO_TUN_endSkewness)
*voper , GEO_IWALL_zEnd_coords   , GEO_TUN_length        , sub          , GEO_IWALL_zEnd_coords
*voper , GEO_IWALL_axial_lengths , GEO_IWALL_zEnd_coords , sub          , GEO_IWALL_zBeg_coords
*afun  , rad

! Inner wall openings
*if,GEO_TUN_modules,gt,1,and,GEO_IWALL_type,eq,1,then
  *del , GEO_IWALL_opening_widths  ,  , nopr
  *del , GEO_IWALL_opening_pitches ,  , nopr
  *dim , GEO_IWALL_opening_widths  ,  , GEO_IWALL_count
  *dim , GEO_IWALL_opening_pitches ,  , GEO_IWALL_count

  accColWidth = GEO_IWALL_columnCount*GEO_IWALL_columnWidth
  *voper , GEO_IWALL_opening_widths  , GEO_IWALL_axial_lengths  , sub , accColWidth
  *voper , GEO_IWALL_opening_widths  , GEO_IWALL_opening_widths , div , GEO_IWALL_openingCount
  *voper , GEO_IWALL_opening_pitches , GEO_IWALL_opening_widths , add , GEO_IWALL_columnWidth

  ! Relative Z coordinate for opening centers
  *del , GEO_IWALL_opening_z_centers ,  , nopr
  *dim , GEO_IWALL_opening_z_centers ,  , GEO_IWALL_count , GEO_IWALL_openingCount
  *do,nthIwall,1,GEO_IWALL_count,1
    openingPitch = GEO_IWALL_opening_pitches(nthIwall)
    firstCenter  = (openingPitch+GEO_IWALL_columnWidth)/2
    *do,nthOpening,1,GEO_IWALL_openingCount,1
      GEO_IWALL_opening_z_centers(nthIwall,nthOpening) = firstCenter+openingPitch*(nthOpening-1)
    *enddo
  *enddo

  ! Relative Y coordinate for opening centers
  GEO_IWALL_openingHeight  = GEO_TUN_effH-GEO_IWALL_topBeamHeight-GEO_IWALL_botBeamHeight
  GEO_IWALL_openingYcenter = (GEO_IWALL_openingHeight/2)+GEO_IWALL_botBeamHeight
*endif

! Wall height at the front of the inlets
setdefa,'GEO_HDW_endH',0


!!                                                                                                !!
!! 2.4  Materials                                                                                 !!
!!                                                                                                !!
! Concrete's elastic modulus
ElasticModulus = 4760*SQRT(MAT_TUN_fck*1e-6)*1e6
MAT_CONC_E     = ElasticModulus

! Soil spring stiffness
SpringConstant = MAT_SOIL_stiffness*ElementArea
SpringArea     = SpringConstant*SpringLength/SpringElasticModulus

! Active Earth Pressure Coeficient (Ka)
ActiveEPCoefficient = TAN((45-(MAT_SOIL_frictionAngle/2))*pi/180)**2
! Rest Earth Pressure Coefficient (K0)
RestEPCoefficient = 1-SIN(MAT_SOIL_frictionAngle*pi/180)

! Rigid struts
MAT_RIGID_E       = 2e9
MAT_RIGID_Poisson = 0.3


!!                                                                                                !!
!! 2.5  Loads                                                                                     !!
!!                                                                                                !!
loadtrain,LOAD_LTA_name,,,,20,1,'LOAD_LTA_FORCES'
! LOAD_LTA_FORCES_count
! LOAD_LTA_FORCES_length
! LOAD_LTA_FORCES_positions
! LOAD_LTA_FORCES_loads

! Calculate design values of loads
LOAD_g_d = LOAD_g_k*LOAD_gammaG

*del,LOAD_LTA_FORCES_loads_d,,nopr
*voper,LOAD_LTA_FORCES_loads_d,LOAD_LTA_FORCES_loads,mult,LOAD_gammaQ

LOAD_WATER_gammaw_d  = MAT_WATER_density*LOAD_g_d

LOAD_SOIL_gammat_d   = MAT_SOIL_density*LOAD_g_d
LOAD_SOIL_gammaw_d   = MAT_SOIL_porosity*LOAD_WATER_gammaw_d
LOAD_SOIL_gammasat_d = LOAD_SOIL_gammat_d+LOAD_SOIL_gammaw_d
LOAD_SOIL_gammasub_d = LOAD_SOIL_gammasat_d-LOAD_WATER_gammaw_d

! Adjust impact coefficient
*if,LOAD_LTA_impactOpt,eq,0,then
  LOAD_LTA_impactCoefficient = 1
*endif

! Z coordinate of point where tunnel axis intersects railway axis (pivot point)
LOAD_z0 = (LOAD_LTA_offsets(1)+LOAD_LTA_offsets(LOAD_LTA_count))/2

! TODO  implement buoyancy calculation correctly
! Buoyancy load on floor slab
! Buoyancy=WaterHeight*Gammaw


!!                                                                                                !!
!! 2.6  Mesh                                                                                      !!
!!                                                                                                !!
*if,GEO_ROOF_type,eq,1,and,GEO_ROOF_continuity,eq,0,then
  FEM_ROOF_posKRot=MAT_CONC_E*FEM_TUN_esize*(GEO_ROOF_precastHeight**3)/(12*GEO_ROOF_precastWidth)
  FEM_ROOF_negKRot=-FEM_ROOF_posKRot
*else
  FEM_ROOF_posKRot=1
  FEM_ROOF_negKRot=-FEM_ROOF_posKRot
*endif


!!                                                                                                !!
!! 2.7  Element types                                                                             !!
!!                                                                                                !!
! Tunnel walls/slabs
et,type_shell181,181

! Soil springs
et,type_link180,180

! Torsional girder springs (single DOF: ROTX)
et,type_combin39,39,,,4

! Piles
et,type_beam188,188


!!                                                                                                !!
!! 2.8  Materials TODO: repeated header                                                           !!
!!                                                                                                !!
! Concrete
mp , ex   , MAT_CONC,ElasticModulus
mp , prxy , MAT_CONC,Poisson
mp , dens , MAT_CONC,MassDensity
mp , alpx , MAT_CONC,1.3e-5

! Soil
mp , ex   , MAT_SOIL,SpringElasticModulus
mp , prxy , MAT_SOIL,Poisson

! Concrete: top slab with equivalent mass density
mp , ex   , MAT_CONCTS,ElasticModulus
mp , prxy , MAT_CONCTS,Poisson
mp , dens , MAT_CONCTS,TopSlab_EqvMassDensity
mp , alpx , MAT_CONCTS,1.3e-5

! Rigid struts
mp , ex   , MAT_RIGID, MAT_RIGID_E
mp , prxy , MAT_RIGID, MAT_RIGID_Poisson


!!                                                                                                !!
!! 2.9  Coordinate systems                                                                        !!
!!                                                                                                !!
! Global cartesian
clocal,CS_global,cart,0,0,0,0,0,0
csys,0

!! 2.9.1  Local systems                                                                           !!
! Tunnel
local  , CS_tunnel    , cart , 0               , 0 , 0              , 0 , -TunnelSlope , 0
clocal , CS_RevTunnel , cart , GEO_TUN_totEffW , 0 , GEO_TUN_length
clocal , CS_RevTunnel , cart , 0               , 0 , 0              ,   ,              , 180

csys   , CS_tunnel
clocal , CS_begSkewed , cart , 0 , 0 , 0 ,  ,  , -GEO_TUN_begSkewness
csys   , CS_revTunnel
clocal , CS_endSkewed , cart , 0 , 0 , 0 ,  ,  , -GEO_TUN_endSkewness

! Top slab
csys   , CS_tunnel
clocal , CS_roof    , cart , 0 , GEO_TUN_effH , 0 ,  , 90

local  , CS_top , CART , 0 , 0 , 0 , 0    , -90-TunnelSlope , 0
clocal , CS_top , CART , 0 , 0 , 0 , -180 , 0               , 0

! Bottom slab
csys   , CS_tunnel
clocal , CS_floor  , cart , 0 , 0 , 0 ,  , 90

local,   CS_bot, cart,  0,  0,  0,    0,  90-TunnelSlope,    0

! Left wall
csys   , CS_tunnel
clocal , CS_leftWall , cart , 0 , 0 , 0 , 90 , 90

local  , CS_left , cart , 0 , 0 , 0 , 0   , -TunnelSlope , 0
clocal , CS_left , cart , 0 , 0 , 0 , 0   , 0            , -90
clocal , CS_left , cart , 0 , 0 , 0 , -90 , 0            , 0

! Right wall (also used for inner walls)
csys   , CS_tunnel
clocal , CS_rightWall , cart , GEO_TUN_totEffW , 0 , 0 , 90 , 90

local  , CS_right , cart , 0 , 0 , 0 , 0  , -TunnelSlope , 0
clocal , CS_right , cart , 0 , 0 , 0 , 0  , 0            , 90
clocal , CS_right , cart , 0 , 0 , 0 , 90 , 0            , 0

csys , 0

! Corbel coordinate systems
xWall=0
*do,nthWall,1,GEO_TUN_modules+1,1
  nthCS=CS_BASE_corbelBot+nthWall
  csys,CS_Tunnel
  clocal,nthCS,CART,xWall,0,0,0,0,0

  mthCS=CS_BASE_corbelTop+nthWall
  csys,CS_Tunnel
  clocal,mthCS,CART,xWall,Eff_GalleryHeight,0,0,0,0

  xWall=xWall+GEO_TUN_effW
*enddo
csys,0

! Inner wall coordinate systems
*if,GEO_TUN_modules,gt,1,then
  *do,nthWall,1,GEO_IWALL_count,1
    xWall = GEO_IWALL_x_coords(nthWall)
    zWall = GEO_IWALL_zBeg_coords(nthWall)
    csys   , CS_leftWall
    clocal , CS_innerWall%nthWall%    , cart , 0     , zWall , xWall
    csys   , CS_Tunnel
    clocal , CS_IWALL_beam%nthWall%   , cart , xWall , 0 , 0      ,    ,  , -90
    clocal , CS_IWALL_column%nthWall% , cart , 0     , 0 , 0      , 90
  *enddo
  csys,0
*endif

! Frame coordinate systems
csys,CS_tunnel
wpcsys,-1
wprota,90
cswpla,CS_HDW_columns,cart

csys,CS_begSkewed
clocal , CS_FRM1_beams   , cart
clocal , CS_FRM1_columns , cart ,  ,  ,  , 90

csys,CS_endSkewed
clocal , CS_FRM2_beams   , cart
clocal , CS_FRM2_columns , cart ,  ,  ,  , 90

! Headwall coordinate systems
csys,CS_tunnel
wpcsys,-1
wpoffs,GEO_TUN_totEffW/2
wprota,,,180
cswpla,CS_hdw1,cart

csys,CS_tunnel
wpcsys,-1
wpoffs,GEO_TUN_totEffW/2,,GEO_TUN_length
cswpla,CS_hdw2,cart

csys,CS_tunnel
wpcsys,-1
wprota,,,90+GEO_HDW_angle
cswpla,CS_HDW1_leftWall,cart

csys,CS_tunnel
wpcsys,-1
wpoffs,GEO_TUN_totEffW
wprota,,,-90-GEO_HDW_angle
cswpla,CS_HDW1_rightWall,cart

csys,CS_tunnel
wpcsys,-1
wpoffs,GEO_TUN_totEffW,,GEO_TUN_length
wprota,,,-90+GEO_HDW_angle
cswpla,CS_HDW2_leftWall,cart

csys,CS_tunnel
wpcsys,-1
wpoffs,,,GEO_TUN_length
wprota,,,90-GEO_HDW_angle
cswpla,CS_HDW2_rightWall,cart

csys,CS_HDW1_leftWall
wpcsys,-1
wprota,,-90
wpoffs,,,-GEO_HDW_footDepth
cswpla,CS_HDW1_leftFoot,cart

csys,CS_HDW1_rightWall
wpcsys,-1
wprota,,-90
wpoffs,,,-GEO_HDW_footDepth
cswpla,CS_HDW1_rightFoot,cart

csys,CS_HDW2_leftWall
wpcsys,-1
wprota,,-90
wpoffs,,,-GEO_HDW_footDepth
cswpla,CS_HDW2_leftFoot,cart

csys,CS_HDW2_rightWall
wpcsys,-1
wprota,,-90
wpoffs,,,-GEO_HDW_footDepth
cswpla,CS_HDW2_rightFoot,cart

! Approach slabs
csys,CS_roof
wpcsys,-1
wpoffs,,GEO_APR_positionLeft
wprota,,,180
cswpla,CS_approachLeft,cart

csys,CS_roof
wpcsys,-1
wpoffs,GEO_TUN_totEffW,GEO_APR_positionRight
cswpla,CS_approachRight,cart

csys,0


!!                                                                                                !!
!! 2.10  Sections                                                                                 !!
!!                                                                                                !!
r,REAL_default,0

! Soil springs
r,REAL_normSprings,SpringArea,0,-1

! Frictional soil springs
r,REAL_longSprings,SpringArea/20,0,0

! Torsional roof slab springs
r,REAL_roofSprings,-1,FEM_ROOF_negKRot,0,0,1,FEM_ROOF_posKRot

! Rigid struts to vertically connect approach and roof slabs one way
r,REAL_rigidStrut,REAL_rigidStrut_A,0,-1

! Tunnel left wall
sectype,SEC_LWALL,SHELL,,'LWALL'
secdata,GEO_OWALL_thk,1
!secoffset,BOT

! Tunnel right wall
sectype,SEC_RWALL,SHELL,,'RWALL'
secdata,GEO_OWALL_thk,1
!secoffset,TOP

! Tunnel inner walls
sectype,SEC_IWALL,SHELL,,'IWALL'
secdata,GEO_IWALL_thk,1

! Tunnel floor slab
sectype,SEC_FLOOR,SHELL,,'FLOOR'
secdata,GEO_FLOOR_thk,1
!secoffset,BOT

! Tunnel ceiling slab
sectype,SEC_ROOF,SHELL,,'ROOF'
secdata,GEO_ROOF_thk,1
!secoffset,TOP

*if,GEO_APR_status,eq,1,then
  sectype,SEC_APR,shell,,'APR'
  secdata,GEO_APR_thk,MAT_CONC
*endif

! Top beam (inner walls)
sectype,SEC_tBeam,shell,,'TBEAM'
secdata,GEO_IWALL_topBeamWidth,MAT_CONC

! Bottom beam (inner walls)
sectype,SEC_bBeam,shell,,'BBEAM'
secdata,GEO_IWALL_botBeamWidth,MAT_CONC

! Columns (inner walls)
sectype,SEC_columns,shell,,'COLS'
secdata,GEO_IWALL_columnThk,MAT_CONC

*if,GEO_PILE_status,eq,1,then
  ! Piles (external walls)
  sectype,SEC_pileExt,beam,csolid,'PILEEXT'
  secdata,GEO_PILE_EXT_diameter/2

  ! Piles (external walls)
  sectype,SEC_pileInt,beam,csolid,'PILEINT'
  secdata,GEO_PILE_INT_diameter/2
*endif

*if,GEO_ROOF_gapStatus,eq,1,and,GEO_ROOF_gapStrutCount,gt,0,then
  sectype,SEC_strut,shell,,'STRUT'
  secdata,GEO_ROOF_gapStrutHeight,MAT_CONC
*endif

*if,GEO_CORB_status,GE,1,THEN
  !TUNNEL_V2_SECCORBEL, namePrefix, corbelParallel, corbelOrtho,  baseThk, orthoThk,           corbelLen,           base_SEC,           base_CS,  dir

  ! Top slab, left side corbels
  TUNNEL_V2_SECCORBEL,       'TL_',    GEO_CORB_width, GEO_CORB_height,  GEO_ROOF_thk,  GEO_OWALL_thk,  GEO_corbelXOff_TOP,   SEC_ROOF_LCORBEL, CS_BASE_corbelTop,  'X'

  ! Top slab, right side corbels
  TUNNEL_V2_SECCORBEL,       'TR_',    GEO_CORB_width, GEO_CORB_height,  GEO_ROOF_thk,  GEO_OWALL_thk, -GEO_corbelXOff_TOP,   SEC_ROOF_RCORBEL, CS_BASE_corbelTop,  'X'

  ! Bottom slab, left side corbels
  TUNNEL_V2_SECCORBEL,       'BL_',    GEO_CORB_width, GEO_CORB_height, GEO_FLOOR_thk,  GEO_OWALL_thk,  GEO_corbelXOff_BOT,  SEC_FLOOR_LCORBEL, CS_BASE_corbelBot,  'X'

  ! Bottom slab, right side corbels
  TUNNEL_V2_SECCORBEL,       'BR_',    GEO_CORB_width, GEO_CORB_height, GEO_FLOOR_thk,  GEO_OWALL_thk, -GEO_corbelXOff_BOT,  SEC_FLOOR_RCORBEL, CS_BASE_corbelBot,  'X'

  ! Walls, bottom corbels
  TUNNEL_V2_SECCORBEL,       'WB_',    GEO_CORB_height, GEO_CORB_width,  GEO_OWALL_thk, GEO_FLOOR_thk,  GEO_corbelYOff_BOT,   SEC_WALL_BCORBEL, CS_BASE_corbelBot,  'Y'

  ! Walls, top corbels
  TUNNEL_V2_SECCORBEL,       'WT_',    GEO_CORB_height, GEO_CORB_width,  GEO_OWALL_thk,  GEO_ROOF_thk, -GEO_corbelYOff_BOT,   SEC_WALL_TCORBEL, CS_BASE_corbelTop,  'Y'

*endif

!!                                                                                                !!
!! 2.11  Frames                                                                                   !!
!!                                                                                                !!
GEO_FRM1_status = 0
GEO_FRM2_status = 0

*if,GEO_FRAME_status,eq,1,or,GEO_FRAME_status,eq,2,then
  GEO_FRM1_status = 1
*endif

*if,GEO_FRAME_status,eq,1,or,GEO_FRAME_status,eq,3,then
  GEO_FRM2_status = 1
*endif


!!                                                                                                !!
!! 2.11  Headwalls                                                                                !!
!!                                                                                                !!
*get,parType,PARM,GEO_HDW_status,TYPE
*if,parType,EQ,0,AND,GEO_HDW_status,GT,0,THEN
  TUNNEL_V2_HDWATTR
*endif


!!                                                                                                !!
!! 2.12  Param refactoring                                                                        !!
!!                                                                                                !!
MAT_CONC_Poisson   = Poisson
MAT_CONC_dens      = MassDensity
GEO_TUN_epsThk     = EPSThk

MAT_SOIL_E         = SpringElasticModulus

FEM_SPR_normLength = SpringLength
FEM_SPR_longLength = LongitSpringLength

SOLU_nsubst        = SubstepCount

LOAD_minSoilCover  = MinimumSoilCover

MAT_CONC_E         = ElasticModulus

FEM_SPR_kLink      = SpringConstant
FEM_SPR_area       = SpringArea

MAT_SOIL_ka        = ActiveEPCoefficient
MAT_SOIL_k0        = RestEPCoefficient

!GEO_TUN_effW       = Eff_GalleryWidth
!GEO_TUN_effH       = Eff_GalleryHeight

GEO_TUN_totEffW    = GEO_TUN_effW*GEO_TUN_modules

GEO_TUN_slopeDeg   = 180*atan(GEO_TUN_slope/100)/PI
GEO_TUN_slopeRad   = GEO_TUN_slopeDeg*PI/180
