! TUNNEL_V2_LSTEP


/solu

ALLSEL

antype,0

*if,FEM_nlgeom,eq,1,then
  nlgeom,on
*else
  nlgeom,off
*endif

nsubst,SubstepCount

outres,erase
outres,all,last

FCUM,ADD

! Get nodal number, location, and quantity in array form for all nodes
*del , NLIST_x           ,  , nopr
*del , NLIST_y           ,  , nopr
*del , NLIST_z           ,  , nopr
*del , NLIST_apportioned ,  , nopr

*vget , NLIST_num , node ,  , nlist
*vget , NLIST_x   , node ,  , loc   , x
*vget , NLIST_y   , node ,  , loc   , y
*vget , NLIST_z   , node ,  , loc   , z

*get , NLIST_count       , parm , NLIST_num   , dim , x
*dim , NLIST_apportioned ,      , NLIST_count

*do,nthNode,1,NLIST_count,1
  NLIST_apportioned(nthNode) = arnode(NLIST_num(nthNode))
*enddo


!!                                                                                                !!
!! 5.1  First load step: dead loads                                                               !!
!!                                                                                                !!
LoadStepIndex=1

ACEL,,LOAD_g_d

! Apply soil pressures
TUNNEL_V2_DEADLOADS

! Pavement dead weight
cmsel,s,COMPA_floor
cmsel,a,COMPA_HDW_slab
cmsel,a,COMPA_HDW_stiffener
esla
sfe,all,1,pres,,LOAD_INNER_pavement_d
allsel

*if,GEO_HDW_status,gt,0,then
  TUNNEL_V2_HDWLOAD
*endif

*if,GEO_PILE_status,eq,1,then
  cmsel,s,COMPK_pileBot
  dk,all,ux,0,,,uy,uz,roty
*endif

ALLSEL
TIME,LoadStepIndex
LSWRITE,1

!! 5.1.5  Capture image                                                                           !!
/psymb,FBCS,0
/pbc,F,,1
/pbc,U,,0
/pbc,ROT,,0
/device,VECTOR,ON
/edge,ALL,1
/eshape,0
ESEL,S,MAT,,1
VIEW4W
EPLOT
fName=STRCAT('LOADS4W_',CHRVAL(LoadStepIndex))
/graphics,FULL
TAKEPIC,fName,1200,1,1
/device,VECTOR,OFF
/edge,ALL,0


!!                                                                                                !!
!! 5.2  Second load step: temperature variation                                                   !!
!!                                                                                                !!
! TODO  load_thermal seems undefined, whole thing is broken
*get,parmType,PARM,LOAD_thermal,TYPE
*if,parmType,EQ,0,AND,LOAD_thermal,NE,0,THEN
  LoadStepIndex=LoadStepIndex+1
  ALLSEL
  LSREAD,1
  FDELE,ALL,ALL
  ACEL,0,LOAD_g_k/100,0
  ESEL,S,TYPE,,1
  NSLE,S
  BF,ALL,TEMP,LOAD_thermal

  ANTYPE,0,NEW
  ALLSEL
  TIME,LoadStepIndex

  nsubst,SubstepCount

  outres,erase
  outres,all,last

  LSWRITE,LoadStepIndex
*endif


!!                                                                                                !!
!! 5.3  Third load step: vehicle load inside tunnel                                               !!
!!                                                                                                !!
! TODO  fix this hardcoded load step
nsel,none
cm,COMPN_shadow,node

*get,parType,parm,LOAD_LTI_name,type
*if,parType,eq,3,then
  *if,LOAD_LTI_name,eq,'TB-450',then
    ALLSEL
    FDELE,ALL,ALL
    LSREAD,1

    csys,CS_Tunnel
    LoadStepIndex=LoadStepIndex+1
    cmsel,s,COMPA_floor
    esla,s
    nsle,s
    cm,COMPN_floor,node

    *do,nthModule,1,GEO_TUN_modules,1
      LV_xcen=(GEO_TUN_effW/2)+(GEO_TUN_effW*(nthModule-1))

      nsel,s,loc,z,LOAD_LTI_position-3,LOAD_LTI_position+3
      nsel,r,loc,x,LV_xcen-1.5,LV_xcen+1.5
      cmsel,r,COMPN_floor
      cmpadd,'COMPN_shadow'

      cmsel,s,COMPN_floor
      n1 = node(LV_xcen-1,0,LOAD_LTI_position-1.5)
      n2 = node(LV_xcen+1,0,LOAD_LTI_position-1.5)
      n3 = node(LV_xcen-1,0,LOAD_LTI_position)
      n4 = node(LV_xcen+1,0,LOAD_LTI_position)
      n5 = node(LV_xcen-1,0,LOAD_LTI_position+1.5)
      n6 = node(LV_xcen+1,0,LOAD_LTI_position+1.5)

      nsel , s , node ,  , n1
      nsel , a , node ,  , n2
      nsel , a , node ,  , n3
      nsel , a , node ,  , n4
      nsel , a , node ,  , n5
      nsel , a , node ,  , n6

      f,all,fy,-75e3*LOAD_gammaQ*1.35
    *enddo

    cmsel,s,COMPN_shadow
    nsel,inve
    cmsel,r,COMPN_floor
    esln,s,1
    cmsel,s,COMPA_floor
    esla,r
    sfe,all,1,pres,,5e3*LOAD_gammaQ

    ALLSEL
    TIME,LoadStepIndex

    nsubst,SubstepCount

    outres,erase
    outres,all,last

    LSWRITE,LoadStepIndex

    csys,CS_tunnel

    fName = 'LOAD_vehicle'
    view4w
    wincln,1
    wincln,2
    wincln,3
    wincln,4
    view1w
    wintitle,-1,'INNER LOAD TRAIN','POSITION AND PRESSURES','[Pa]',,,13
    view4w,,1
    clims,,,,5
    g_picres,1200
    /psymb,fbcs,0
    /pbc,f,,1
    /pbc,u,,0
    /pbc,rot,,0
    /psf,pres,norm,2,0,on
    /gformat,f,1,0
    /udoc,1,cntr,right
    /udoc,3,cntr,right
    /plopts,leg3,on
    /edge,all,1
    /eshape,0
    /auto,all
    /triad,on
    esel,s,mat,,1
    eplot
    /user,all
    /graphics,full

    go2png,1200
      /device,vector,on
      eplot
      /noerase
      cleanplot,'eplot'
      /device,vector,off
    endpng,fName,,,,,FOLDER_setup

    /erase
    /annot,dele
    windefa,1
    windefa,2
    windefa,3
    windefa,4
    clims
    /edge,all,0

  *endif
*endif


!!                                                                                                !!
!! 5.4  Fourth load step: vehicle over inlet approach slabs                                       !!
!!                                                                                                !!
! TODO  fix this hardcoded load step
LOAD_LTI_HDW1_position = -GEO_HDW1_slabLength+1.5
LOAD_LTI_HDW2_position = GEO_TUN_length+GEO_HDW2_slabLength-1.5

nsel,none
cm,COMPN_HDW_shadow,node

*get,parType,parm,LOAD_LTI_name,type
*if,parType,eq,3,then
  *if,GEO_HDW_status,gt,0,then
    *if,LOAD_LTI_name,eq,'TB-450',then
      ALLSEL
      FDELE,ALL,ALL
      LSREAD,1

      csys,CS_Tunnel
      LoadStepIndex=LoadStepIndex+1
      cmsel,s,COMPA_HDW_slab
      esla,s
      nsle,s
      cm,COMPN_HDW_slab,node

      *do,nthHdw,1,2,1
        *do,nthModule,1,GEO_TUN_modules,1
          afunbackup,'DEG'
          LV_xcen = (GEO_TUN_effW/2)+(GEO_TUN_effW*(nthModule-1))
          LV_zcen = LOAD_LTI_HDW%nthHdw%_position+(LV_xcen*tan(GEO_TUN_begSkewness))
          afunrestore

          nsel , s , loc , z , LV_zcen-3   , LV_zcen+3
          nsel , r , loc , x , LV_xcen-1.5 , LV_xcen+1.5
          cmsel,r,COMPN_HDW_slab
          cmpadd,'COMPN_HDW_shadow'

          cmsel,s,COMPN_HDW_slab
          cmsel,a,COMPN_floor
          n1 = node(LV_xcen-1 , 0 , LV_zcen-1.5)
          n2 = node(LV_xcen+1 , 0 , LV_zcen-1.5)
          n3 = node(LV_xcen-1 , 0 , LV_zcen)
          n4 = node(LV_xcen+1 , 0 , LV_zcen)
          n5 = node(LV_xcen-1 , 0 , LV_zcen+1.5)
          n6 = node(LV_xcen+1 , 0 , LV_zcen+1.5)

          nsel , s , node ,  , n1
          nsel , a , node ,  , n2
          nsel , a , node ,  , n3
          nsel , a , node ,  , n4
          nsel , a , node ,  , n5
          nsel , a , node ,  , n6

          f,all,fy,-75e3*LOAD_gammaQ*1.35
        *enddo
      *enddo

      cmsel,s,COMPN_HDW_shadow
      nsel,inve
      cmsel,r,COMPN_HDW_slab
      esln,s,1
      cmsel,s,COMPA_HDW_slab
      esla,r
      sfe,all,1,pres,,5e3*LOAD_gammaQ

      ALLSEL
      TIME,LoadStepIndex

      nsubst,SubstepCount

      outres,erase
      outres,all,last

      LSWRITE,LoadStepIndex

      csys,CS_tunnel

      fName = 'LOAD_HDW_vehicle'
      view4w
      wincln,1
      wincln,2
      wincln,3
      wincln,4
      view1w
      wintitle,-1,'INNER LOAD TRAIN','POSITION AND PRESSURES','[Pa]',,,13
      view4w,,1
      clims,,,,5
      g_picres,1200
      /psymb,fbcs,0
      /pbc,f,,1
      /pbc,u,,0
      /pbc,rot,,0
      /psf,pres,norm,2,0,on
      /gformat,f,1,0
      /udoc,1,cntr,right
      /udoc,3,cntr,right
      /plopts,leg3,on
      /edge,all,1
      /eshape,0
      /auto,all
      /triad,on
      esel,s,mat,,1
      eplot
      /user,all
      /graphics,full

      go2png,1200
        /device,vector,on
        eplot
        /noerase
        cleanplot,'eplot'
        /device,vector,off
      endpng,fName,,,,,FOLDER_setup

      /erase
      /annot,dele
      windefa,1
      windefa,2
      windefa,3
      windefa,4
      clims
      /edge,all,0

    *endif
  *endif
*endif


!!                                                                                                !!
!! 5.5  Remaining load steps: load train movement                                                 !!
!!                                                                                                !!
lsel,none
cm,COMPL_ltpos,line

*do,xOffIndex,1,LOAD_LTA_positionCount,1

  xOffset       = LOAD_LTA_positions(xOffIndex)
  LoadStepIndex = LoadStepIndex+1

  ! Import loading from first load step
  ALLSEL
  FDELE,ALL,ALL
  sfedele,all,all,all
  LSREAD,1


  !! 5.4.1  Roof & approach slab                                                                !!
  *msg,UI,FILE_name,LoadStepIndex
TUNNEL # %s %/&
LOAD STEP %4I %/&
APPLYING LOADS ON ROOF SLAB...

  CMSEL,S,COMPA_Roof
  cmsel,a,COMPA_Approach
  NSLA,S,1
  tunnel_v2_verboussinesq
  ALLSEL


  !! 5.4.2  Left wall                                                                           !!
  *msg,UI,FILE_name,LoadStepIndex
TUNNEL # %s %/&
LOAD STEP %4I %/&
APPLYING LOADS ON LEFT WALL...

  CMSEL,S,COMPA_LeftWall
  NSLA,S,1
  tunnel_v2_horboussinesq, 1, 'off', 0
  ALLSEL

  !! 5.4.3  Right wall                                                                          !!
  *msg,UI,FILE_name,LoadStepIndex
TUNNEL # %s %/&
LOAD STEP %4I %/&
APPLYING LOADS ON RIGHT WALL...

  CMSEL,S,COMPA_RightWall
  NSLA,S,1
  tunnel_v2_horboussinesq, -1, GEO_TUN_totEffW, 'off'
  ALLSEL

  !! 5.4.4  Floor slab                                                                          !!
  CMSEL,S,COMPA_Floor
  NSLA,S,1
  ! Water buoyancy pressure
  *if,WaterHeight,GT,0,THEN

    *msg,UI,FILE_name,LoadStepIndex
TUNNEL # %s %/&
LOAD STEP %4I %/&
APPLYING BUOYANCY LOADS ON FLOOR SLAB...

    ! TODO  needs to be revised to correctly use nodal apportioned area
    !       and to be converted to design value instead of characteristic value
    *msg,fatal
FATAL: buoyancy loads not correctly implemented in TUNNEL_V2.%/&
Fix implementation and run the simulation again.%/&
Run terminated.
    F,ALL,FY,BuoyancyLoad

  *endif
  ALLSEL

  !! 5.4.5  Wings                                                                               !!
  *if,GEO_HDW_type,EQ,1,THEN  ! TODO  param eliminated

    *msg,UI,FILE_name,LoadStepIndex
TUNNEL # %s %/&
LOAD STEP %4I %/&
APPLYING LOADS ON WINGS...

    CMSEL,S,COMPA_HDW_Walls
    CMSEL,A,COMPA_HDW_TopBeam
    NSLA,S,1
    tunnel_v2_hdwboussinesq
    ALLSEL

  *endif

  !! 5.4.6  Retaining walls                                                                       !!
  *if,GEO_HDW1_type,eq,1,then
    cmsel,s,COMPA_HDW1_walls
    nsla,s,1
    tunnel_v2_hdwboussinesq
    allsel
  *endif

  *if,GEO_HDW2_type,eq,1,then
    cmsel,s,COMPA_HDW2_walls
    nsla,s,1
    tunnel_v2_hdwboussinesq
    allsel
  *endif

  !! 5.4.6  Capture image                                                                       !!
  /psymb,FBCS,0
  /pbc,F,,1
  /pbc,U,,0
  /pbc,ROT,,0
  /device,VECTOR,ON
  /edge,ALL,1
  /eshape,0
  ESEL,S,MAT,,1
  VIEW4W
  EPLOT
  fName=STRCAT('LOADS4W_',CHRVAL(LoadStepIndex))
  /graphics,FULL
  TAKEPIC,fName,1200,1,1
  /device,VECTOR,OFF
  /edge,ALL,0

  !! 5.4.7  Write load step                                                                     !!
  ANTYPE,0,NEW
  ALLSEL
  TIME,LoadStepIndex

  !!                                                                                            !!
  ! hardcoded temperature gradient for: 03 Design / 41 PI Monlevade / 03 MODELS / c_thermal_combined
  !! ESEL,S,TYPE,,1     !!
  !! NSLE,S             !!
  !! BF,ALL,TEMP,30     !!
  !! allsel             !!
  !!                                                                                            !!

  nsubst,SubstepCount

  outres,erase
  outres,all,last

  LSWRITE,LoadStepIndex

*enddo

LoadStepCount = LoadStepIndex

! Capture images: load train positions
allsel
view1w
/view,1,1,1,1
/window,2,-1,0.335,0,1
/view,2,0,0,1
/auto,2

/gtype,ALL,node,0
/gtype,ALL,elem,0
/gtype,ALL,area,1
/gtype,ALL,line,1
/gtype,ALL,keyp,0
/auto,1
gplot
/focus,1,0.001,0.001,0.001,1
/dist,1,0.8,1
/focus,2,0.001,0.001,0.001,1
/dist,2,0.8,1

*do,nthLTPos,1,LOAD_LTA_positionCount,1
  compName=strcat('LTx_',chrval(nthLTPos))
  GO2PNG,800
    aplot
    /noerase
    cmsel,s,%compName%
    lplot
    /replot
    /erase
  ENDPNG,compName
*enddo

/gtype,ALL,node,1
/gtype,ALL,elem,1
/gtype,ALL,area,1
/gtype,ALL,line,1
/gtype,ALL,keyp,1
/window,2,dele
