! Prepare environment
/output,outfile,out
/uis,msgpop,3
init, 'TUNNEL_V2_DEFAULT'

/prep7

/nopr
/uis,replot,0
/uis,msgpop,3
immed,0

! Registrar o tempo de início da solução TODO: improve param name
*get,t0,active,0,time,wall


! TODO HOTFIX
GEO_HDW_angle        = GEO_HDW1_LEFT_wallAngle
GEO_HDW_topLength    = GEO_HDW1_LEFT_wallTopLength
GEO_HDW_footDepth    = GEO_HDW1_LEFT_footDepth
GEO_HDW_slabStfWidth = GEO_HDW1_slabStfWidth


!!                                                                                                !!
!! 2.  Attributes                                                                                 !!
!!                                                                                                !!
TUNNEL_V2_ATTR


!!                                                                                                !!
!! 3.  Solid model                                                                                !!
!!                                                                                                !!
TUNNEL_V2_SM


!!                                                                                                !!
!! 4.  Finite element model                                                                       !!
!!                                                                                                !!
TUNNEL_V2_FEM


!!                                                                                                !!
!! 5.  Load steps                                                                                 !!
!!                                                                                                !!
TUNNEL_V2_LSTEP


!!                                                                                                !!
!! 6.  Solution                                                                                   !!
!!                                                                                                !!
*msg,UI,FILE_name
TUNNEL # %s %/&
SOLVING THE MODEL...

/solu

allsel
nldiag,nrre,on
cnvtol,f,,0.01,2,0.01
save
/uis,abort,off
keyw,pr_sgui,1
lssolve,1,loadStepCount,1
keyw,pr_sgui,0


!!                                                                                                !!
!! 7.  Post-processing                                                                            !!
!!                                                                                                !!
*msg,UI,FILE_name
TUNNEL # %s %/&
WRITING RESULTS...

TUNNEL_V2_POST

*msg,UI,FILE_name
TUNNEL # %s %/&
FINISHED ANALYSIS!

! Reativar exibição automática
/gopr
/uis,replot,1

allsel
view1w
windefa
/annot,dele
eplot

TUNNEL_V2_SUMMARY

finish
